*Heading
** Job name: Job-1 Model name: Model-1
** Generated by: Abaqus/CAE 2020
*Preprint, echo=NO, model=NO, history=NO, contact=NO
**
** PARTS
**
*Part, name=Part-1
*Node
      1,  -16.6599998,    47.142807,           0.
      2,  -16.6599998,   44.1008949,   16.6599998
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*Element, type=S4R
 1,   1,  10, 106,  41
 2,  10,  11, 107, 106
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*Elset, elset="jiaqiang ply", generate
   1,  324,    1
*Elset, elset="CMShell__0 degree", generate
    1,  2412,     1
*Elset, elset="CMShell__90 degree", generate
    1,  2412,     1
*Elset, elset=CMShell__jiqiang, generate
   1,  324,    1
*Orientation, name=Ori-CMShell__Orientation, system=RECTANGULAR
CMShell__Orientation
3, 0.
** Region: (CMShell-2: Generated From Layup)
*Elset, elset=CMShell-2, generate
   1,  324,    1
** Section: CMShell-2
*Shell Section, elset=CMShell-2, composite, orientation=Ori-CMShell__Orientation, offset=-0.5, layup=CMShell
"CMShell__0 degree_Thickness", 3, ply, 0., "ply_0 degree"
"CMShell__90 degree_Thickness", 3, ply, "CMShell__90 degree_Rotation", "ply_90 degree"
CMShell__jiqiang_Thickness, 3, ply, CMShell__jiqiang_Rotation, jiqiang
"CMShell__90 degree_Thickness", 3, ply, "CMShell__90 degree_Rotation", "ply_90 degree_2"
"CMShell__0 degree_Thickness", 3, ply, 0., "ply_0 degree_2"
** Region: (CMShell-1: Generated From Layup)
*Elset, elset=CMShell-1, generate
  325,  2412,     1
** Section: CMShell-1
*Shell Section, elset=CMShell-1, composite, orientation=Ori-CMShell__Orientation, offset=-0.5, layup=CMShell
"CMShell__0 degree_Thickness", 3, ply, 0., "ply_0 degree"
"CMShell__90 degree_Thickness", 3, ply, "CMShell__90 degree_Rotation", "ply_90 degree"
"CMShell__90 degree_Thickness", 3, ply, "CMShell__90 degree_Rotation", "ply_90 degree_2"
"CMShell__0 degree_Thickness", 3, ply, 0., "ply_0 degree_2"
*Distribution, name=CMShell__Orientation, location=ELEMENT, Table=CMShell__Orientation_Table
** Description: Created by Composites Modeler
,           1.,           0.,           0.,           0.,           1.,           0.
1, 0.948938896393927, 0.315459697546132, 0.000387472295208524, -0.00155194170392852, 0.0195492325951733, -0.999807690999568
2, 0.948806766927741, 0.315854110187262, 0.00137844475410039, 0.0100388591006127, 0.063490003762222, -0.997931982015924
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2412, 0.999808938603465, -0.0182857325045071, -0.00690784158661038, 0.000764788187090124, 0.354351440173537, -0.935112010374142
*Distribution, name="CMShell__0 degree_Thickness", location=ELEMENT, Table="CMShell__0 degree_Thickness_Table"
** Description: Created by Composites Modeler
,   0.15
1, 0.150001
2, 0.15006
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2412,   0.15
*Distribution, name="CMShell__90 degree_Thickness", location=ELEMENT, Table="CMShell__90 degree_Thickness_Table"
** Description: Created by Composites Modeler
,   0.15
1, 0.150001
2, 0.15006
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2412,   0.15
*Distribution, name="CMShell__90 degree_Rotation", location=ELEMENT, Table="CMShell__90 degree_Rotation_Table"
** Description: Created by Composites Modeler
,     0.
1, 89.7532
2, 88.3838
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2412, 89.9572
*Distribution, name=CMShell__jiqiang_Thickness, location=ELEMENT, Table=CMShell__jiqiang_Thickness_Table
** Description: Created by Composites Modeler
,   0.15
1, 0.150154
2, 0.150152
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324,   0.15
*Distribution, name=CMShell__jiqiang_Rotation, location=ELEMENT, Table=CMShell__jiqiang_Rotation_Table
** Description: Created by Composites Modeler
,     0.
1, 43.582
2, 43.2068
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324, 45.0103
*End Part
**
**
** ASSEMBLY
**
*Assembly, name=Assembly
**
*Instance, name=Part-1-1, part=Part-1
*End Instance
**
*Nset, nset=Set-fixed, instance=Part-1-1
  370,  371,  400,  401,  402,  403
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*Elset, elset=Set-fixed, instance=Part-1-1
  353,  382,  411,  440,  469,  498
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*Elset, elset=_Surf-1_SPOS, internal, instance=Part-1-1, generate
    1,  2412,     1
*Surface, type=ELEMENT, name=Surf-1
_Surf-1_SPOS, SPOS
*End Assembly
**
** MATERIALS
**
*Material, name=ply
*Density
 1.6e-09,
*Elastic, type=LAMINA
155600.,8200., 0.34,4500.,4500.,2500.
*Distribution Table, name=CMShell__Orientation_Table
coord3d, coord3d
*Distribution Table, name="CMShell__0 degree_Thickness_Table"
length
*Distribution Table, name="CMShell__90 degree_Thickness_Table"
length
*Distribution Table, name="CMShell__90 degree_Rotation_Table"
angle
*Distribution Table, name=CMShell__jiqiang_Thickness_Table
length
*Distribution Table, name=CMShell__jiqiang_Rotation_Table
angle
** ----------------------------------------------------------------
**
** STEP: Step-1
**
*Step, name=Step-1, nlgeom=NO
*Static
0.1, 1., 1e-05, 0.1
**
** BOUNDARY CONDITIONS
**
** Name: fixed Type: Symmetry/Antisymmetry/Encastre
*Boundary
Set-fixed, ENCASTRE
**
** LOADS
**
** Name: Load-1   Type: Pressure
*Dsload
Surf-1, P, 10.
**
** OUTPUT REQUESTS
**
*Restart, write, frequency=0
**
** FIELD OUTPUT: F-Output-2
**
*Output, field
*Element Output, elset=Part-1-1.CMShell-1, directions=YES
1, 2, 3, 4, 5, 6, 7, 8, 9, 10, 11, 12
DAMAGEC, E, HSNFCCRT, HSNFTCRT, HSNMCCRT, HSNMTCRT, MISES, S
**
** FIELD OUTPUT: F-Output-2
**
*Element Output, elset=Part-1-1.CMShell-2, directions=YES
1, 2, 3, 4, 5, 6, 7, 8, 9, 10, 11, 12, 13, 14, 15
DAMAGEC, E, HSNFCCRT, HSNFTCRT, HSNMCCRT, HSNMTCRT, MISES, S
**
** FIELD OUTPUT: F-Output-1
**
*Output, field, variable=PRESELECT
**
** HISTORY OUTPUT: H-Output-1
**
*Output, history, variable=PRESELECT
*End Step
